*Heading
** Job name: L5H2_1 Model name: Model-1
** Generated by: Abaqus/CAE 6.12-4
*Preprint, echo=NO, model=NO, history=NO, contact=NO
**
** PARTS
**
*Part, name=Part-1
*End Part
**
**
** ASSEMBLY
**
*Assembly, name=Assembly
**
*Instance, name=Part-1-1, part=Part-1
*Node
      1,           5.,           1.
      2,           5.,           0.
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*Element, type=B21
1, 1, 2
2, 3, 2
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*Nset, nset=Set-I
  5,  6,  7, 14, 15, 16, 19
*Elset, elset=Set-I
  7,  8, 23, 25, 39, 40
*Nset, nset=Set-S
  1,  2,  3,  4,  5,  7
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*Elset, elset=Set-S
  1,  2,  3,  4,  5,  6
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*Nset, nset=_PickedSet4, internal, generate
  1,  19,   1
*Elset, elset=_PickedSet4, internal, generate
  1,  40,   1
** Section: Section-S  Profile: Profile-1
*Beam Section, elset=Set-S, material=Material-S, lumped=NO, temperature=GRADIENTS, section=CIRC
1.
0.,0.,-1.
** Section: Section-I  Profile: Profile-1
*Beam Section, elset=Set-I, material=Material-I, lumped=NO, temperature=GRADIENTS, section=CIRC
1.
0.,0.,-1.
*End Instance
**
*Nset, nset=Set-lc, instance=Part-1-1
  9, 10, 18
*Nset, nset=Set-ef, instance=Part-1-1
 4,
*End Assembly
**
** MATERIALS
**
*Material, name=Material-I
*Elastic
 31.6228, 0.3
*Material, name=Material-S
*Elastic
1., 0.3
**
** BOUNDARY CONDITIONS
**
** Name: lc Type: Displacement/Rotation
*Boundary
Set-lc, 1, 1
Set-lc, 2, 2
Set-lc, 6, 6
** ----------------------------------------------------------------
**
** STEP: af
**
*Step, name=af
*Static
0.001, 1., 1e-05, 0.1
**
** LOADS
**
** Name: ef   Type: Concentrated force
*Cload
Set-ef, 2, -1.
**
** OUTPUT REQUESTS
**
*Restart, write, frequency=0
**
** FIELD OUTPUT: F-Output-1
**
*Output, field, variable=PRESELECT
**
** HISTORY OUTPUT: H-Output-1
**
*Output, history, variable=PRESELECT
*End Step
