*HEADING
 VERIFICATION OF ABAQUS FREQUENCY ANALYSIS OUTPUT TO MATLAB (RECORD KEY 1980)
*PART, NAME=PART-5
*END PART
*ASSEMBLY, NAME=ASSEMBLY
*INSTANCE, NAME=PART-5-1, PART=PART-5
*NODE
 1,	720,	360
 2,	720,	0
 3,	360,	360
 4,	360,	0
 5,	0,	360
 6,	0,	0
*ELEMENT, TYPE=FRAME2D
 1, 5, 3
 2, 3, 1
 3, 6, 4
 4, 4, 2
 5, 3, 4
 6, 1, 2
 7, 5, 4
 8, 6, 3
 9, 3, 2
 10, 4, 1
*ELSET, ELSET=_PICKEDSET2_#1, INTERNAL
 1,
*ELSET, ELSET=_PICKEDSET2_#2, INTERNAL
 2,
*ELSET, ELSET=_PICKEDSET2_#3, INTERNAL
 3,
*ELSET, ELSET=_PICKEDSET2_#4, INTERNAL
 4,
*ELSET, ELSET=_PICKEDSET2_#5, INTERNAL
 5,
*ELSET, ELSET=_PICKEDSET2_#6, INTERNAL
 6,
*ELSET, ELSET=_PICKEDSET2_#7, INTERNAL
 7,
*ELSET, ELSET=_PICKEDSET2_#8, INTERNAL
 8,
*ELSET, ELSET=_PICKEDSET2_#9, INTERNAL
 9,
*ELSET, ELSET=_PICKEDSET2_#10, INTERNAL
 10,
*FRAME SECTION, ELSET=_PICKEDSET2_#1, PINNED
 1, 1.6E-3, 0, 9E-4
 0.,0.,-1.
 1E4, 1E3
*FRAME SECTION, ELSET=_PICKEDSET2_#2, PINNED
 1, 1.6E-3, 0, 9E-4
 0.,0.,-1.
 1E4, 1E3
*FRAME SECTION, ELSET=_PICKEDSET2_#3, PINNED
 1, 1.6E-3, 0, 9E-4
 0.,0.,-1.
 1E4, 1E3
*FRAME SECTION, ELSET=_PICKEDSET2_#4, PINNED
 1, 1.6E-3, 0, 9E-4
 0.,0.,-1.
 1E4, 1E3
*FRAME SECTION, ELSET=_PICKEDSET2_#5, PINNED
 1, 1.6E-3, 0, 9E-4
 0.,0.,-1.
 1E4, 1E3
*FRAME SECTION, ELSET=_PICKEDSET2_#6, PINNED
 1, 1.6E-3, 0, 9E-4
 0.,0.,-1.
 1E4, 1E3
*FRAME SECTION, ELSET=_PICKEDSET2_#7, PINNED
 1, 1.6E-3, 0, 9E-4
 0.,0.,-1.
 1E4, 1E3
*FRAME SECTION, ELSET=_PICKEDSET2_#8, PINNED
 1, 1.6E-3, 0, 9E-4
 0.,0.,-1.
 1E4, 1E3
*FRAME SECTION, ELSET=_PICKEDSET2_#9, PINNED
 1, 1.6E-3, 0, 9E-4
 0.,0.,-1.
 1E4, 1E3
*FRAME SECTION, ELSET=_PICKEDSET2_#10, PINNED
 1, 1.6E-3, 0, 9E-4
 0.,0.,-1.
 1E4, 1E3
*ELEMENT,TYPE=MASS,ELSET=MASSES
 11,1
 12,2
 13,3
 14,4
 15,5
 16,6
*MASS, ELSET=MASSES
 1
*END INSTANCE
*NSET, NSET=_PICKEDSET21, INTERNAL, INSTANCE=PART-5-1
 2, 4
*NSET, NSET=_PICKEDSET22, INTERNAL, INSTANCE=PART-5-1
 5, 6
*END ASSEMBLY
*STEP, NAME=STEP-2, NLGEOM=YES, PERTURBATION
*FREQUENCY, EIGENSOLVER=LANCZOS, ACOUSTIC COUPLING=ON, NORMALIZATION=DISPLACEMENT
10, , , , ,
*BOUNDARY
 _PICKEDSET22, 1, 1
 _PICKEDSET22, 2, 2
*FILE FORMAT, ASCII
*EL FILE
 SF
*END STEP
