*Heading
** Job name: Job-1 Model name: Model-1
** Generated by: Abaqus/CAE 6.14-1
*Preprint, echo=NO, model=NO, history=NO, contact=NO
**
** PARTS
**
*Part, name=beam
*End Part
**
**
** ASSEMBLY
**
*Assembly, name=Assembly
**
*Instance, name=beam-1, part=beam
*Node
      1,          25.,           0.
      2,          25.,          20.
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*Element, type=CPS3
 1,  1, 17, 63
 2, 63, 30,  1
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*Nset, nset=Set-I1
  1,  2,  5,  6,  7,  8
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*Elset, elset=Set-I1
  41,  42,  43,  44,  45,  46
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*Nset, nset=Set-S
  1,  2,  3,  4,  5,  6
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*Elset, elset=Set-S
   1,   2,   3,   4,   5,   6
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** Section: Section-S
*Solid Section, elset=Set-S, material=Material-S
,
** Section: Section-I1
*Solid Section, elset=Set-I1, material=Material-I1
,
*End Instance
**
*Nset, nset=Set-2, instance=beam-1
 13, 14, 51, 52, 53
*Elset, elset=Set-2, instance=beam-1, generate
 114,  120,    2
*Nset, nset=Set-3, instance=beam-1
  2,  6,  8, 10, 11, 16
*Nset, nset=Set-af1, instance=beam-1
 2, 6
*Nset, nset=Set-af2, instance=beam-1
  8, 10
*Nset, nset=Set-af3, instance=beam-1
 11, 16
*Nset, nset=Set-lc, instance=beam-1
  3,  4, 24, 25, 26
*Elset, elset=Set-lc, instance=beam-1, generate
 34,  40,   2
*End Assembly
*Amplitude, name=Amp-af1
            0.1,         0.03317,             0.2,         0.18945,             0.3,         0.57595,             0.4,              1.
            0.5,              1.,             0.6,         0.57595,             0.7,         0.18945,             0.8,         0.03317
            0.9,              0.
*Amplitude, name=Amp-af2
            0.1,         0.24644,             0.2,             -1.,             0.3,         0.24644,             0.4,              0.
*Amplitude, name=Amp-af3
            0.1,        0.013064,             0.2,        0.055097,             0.3,         0.15974,             0.4,         0.35797
            0.5,         0.63398,             0.6,          0.8924,             0.7,              1.,             0.8,          0.8924
            0.9,         0.63398,              1.,         0.35797,             1.1,         0.15974,             1.2,        0.055097
            1.3,        0.013064,             1.4,              0.
**
** MATERIALS
**
*Material, name=Material-I1
*Density
 0.01,
*Elastic
1., 0.3
*Material, name=Material-S
*Density
 0.01,
*Elastic
1., 0.3
** ----------------------------------------------------------------
**
** STEP: Step-af
**
*Step, name=Step-af, nlgeom=NO, inc=10000
*Dynamic,alpha=0.,direct
0.1,9.9,
**
** BOUNDARY CONDITIONS
**
** Name: BC-lc Type: Displacement/Rotation
*Boundary
Set-lc, 1, 1
Set-lc, 2, 2
Set-lc, 6, 6
** Name: BC-rc Type: Displacement/Rotation
*Boundary
Set-2, 1, 1
Set-2, 2, 2
Set-2, 6, 6
**
** LOADS
**
** Name: Load-af1   Type: Concentrated force
*Cload, amplitude=Amp-af1
Set-af1, 1, 1.
Set-af1, 2, 1.
** Name: Load-af2   Type: Concentrated force
*Cload, amplitude=Amp-af2
Set-af2, 2, -1.
** Name: Load-af3   Type: Concentrated force
*Cload
Set-af3, 2, -1.
**
** OUTPUT REQUESTS
**
*Restart, write, frequency=0
**
** FIELD OUTPUT: F-Output-1
**
*Output, field, variable=PRESELECT, frequency=1
**
** HISTORY OUTPUT: H-Output-1
**
*Output, history, variable=PRESELECT
*End Step
